!------------------------------------------------------------------------------------
! Script to run IEEE 34-bus Test Feeder Mod 2 - Custom
!------------------------------------------------------------------------------------
!

Clear


!------------------------------------------------------------------------------------
! Load system
!------------------------------------------------------------------------------------
!

Redirect "./src/config/ieee34Mod2.dss"
Redirect "./src/config/loadShapes.dss"
Redirect "./src/config/pvUnits.dss"


!------------------------------------------------------------------------------------
! Add data monitoring
!------------------------------------------------------------------------------------
!

//TODO


!------------------------------------------------------------------------------------
! Set simulation config
!------------------------------------------------------------------------------------
!

set mode = daily
set stepsize = 1h
set number = 24

set maxcontroliter=300


!------------------------------------------------------------------------------------
! Run
!------------------------------------------------------------------------------------
!

solve
